# 你可按需要调整以下厚度（Å）
variable frozen_layer_height     equal 40.0     # 冻结层厚度
variable thermostat_layer_height equal 20.0     # 恒温层厚度
variable thermostat_upper_z      equal ${zmin}+${frozen_layer_height}
variable mobile_layer_upper_z    equal ${zmax}

# 区域与分组
region frozen_layer     block INF INF INF INF ${zmin} ${thermostat_upper_z}     units box
region thermostat_layer block INF INF INF INF ${thermostat_upper_z} \
                                  ${thermostat_upper_z}+${thermostat_layer_height} units box
region mobile_layer     block INF INF INF INF ${thermostat_upper_z}+${thermostat_layer_height} \
                                  ${mobile_layer_upper_z} units box

group  frozen_atoms     region frozen_layer
group  thermostat_atoms region thermostat_layer
group  mobile_atoms     region mobile_layer

# 整体 NVE 积分组 = 粒子(Cu) + 可动衬底
group  nve_atoms union particle_group mobile_atoms

# 4. 初始温度与撞击速度
velocity mobile_atoms   create 300.0 12345 mom yes rot yes dist gaussian
variable impact_vel     equal -5.0                 # 5 Å/ps ≈ 500 m/s，沿 -z
velocity particle_group set 0.0 0.0 ${impact_vel} sum yes units box

# 5. 势函数
pair_style  eam/alloy
pair_coeff  * * /home/wuwen/lammps/potentials/AlCu.eam.alloy  Al  Cu


# 若暂时找不到 Al-Cu 合金势，可以临时用 hybrid/overlay + lj/cut 给跨项做占位（不建议长期使用）
# pair_style hybrid/overlay eam/alloy lj/cut 10
# pair_coeff * * eam/alloy ${POTFILE} Al Cu
# pair_coeff 1 2 lj/cut 0.0000001 10

# 6. 约束与积分
fix 1 frozen_atoms     setforce 0.0 0.0 0.0
velocity frozen_atoms  set 0 0 0
fix 2 thermostat_atoms nvt temp 300.0 300.0 0.1
fix 3 nve_atoms        nve

# 7. 输出
thermo_style custom step time temp pe ke etotal press
thermo 200
dump 1 all custom 200 dump.impact.lammpstrj id type x y z vx vy vz

# 8. 运行
timestep 0.0001    # 0.1 fs
run 100000         # 10 ps

write_restart restart.impact
